// COMSOL Multiphysics 6.4.0.293 model "2.mph"
// Outline of the model tree

Parameters
  A1 = 0  // 初始角标
  A2 = 9  // 正极角标/隔膜初始角标
  B2 = 9.5  // 负极初始角标/隔膜末尾角标
  C2 = 18.5  // 负极末尾角标
  r_pos = 0.1  // 正极颗粒半径大小
  r_neg = 0.2  // 负极颗粒半径大小
  deltaV_pos = 0.03  // 正极相对体积变化
  deltaV_neg = 0.0478  // 负极相对体积变化
  currentiter = 0
  I_app = 1[A]
  U_ocv = 4.2[V]
  V_T = 3.2[V]
  C_c = 20[J/K]
  C_s = 5[J/K]
  R_c = 0.2[K/W]
  R_u = 5[K/W]
  T_f = 298.15[K]
  k0 = 1e-8[1/s]
  Ea_Mn = 45000[J/mol]
  R_gas = 8.314[J/(mol*K)]
  eps_active0 = 0.6
  D_Si = 1e-18[m^2/s]
  k_S2 = 1e-9[1/s]
  k_S3 = 5e-10[1/s]
  k_S4 = 2e-10[1/s]
  C_S0 = 1000[mol/m^3]
  M_SEI = 0.16[kg/mol]
  rho_SEI = 1600[kg/m^3]
  F_Faraday = 96485[C/mol]
  L_SEI0 = 1e-9[m]
  kappa_SEI = 1e-14[S/m]
  beta_exp = 1e-6[m^3/mol]
  alpha_th = 1e-5[1/K]

Variables
  var1 "变量 1"
    T_LESS = T/(1[K])  // 温度无量纲

Geometry
  geom1 "几何 1" (1D, length unit µm)
    i1: Interval "正极" | coord = {A1, A2}
    i2: Interval "隔膜" | coord = {A2, B2}
    i3: Interval "负极" | coord = {B2, C2}
    fin: Finalize "形成联合体"

Materials
  mat1: Common "LMO, LiMn2O4 Spinel (Positive, Li-ion Battery)" on domains 1, 2
    def: def "Basic"
      youngsmodulus = 194[GPa]
      poissonsratio = 0.26
      electricconductivity = 3.8[S/m]
      diffusion = 1e-14*exp(20000/8.314*(1/(T_ref/1[K])-1/(T2/1[K])))[m^2/s]
      density = 4140[kg/m^3]
      T_ref = 298[K]
      T2 = min(393.15,max(T,223.15))
      csmax = 22860[mol/m^3]
      thermalconductivity = 750
      heatcapacity = 1200
      thermalexpansioncoefficient = 1.2e-5
    ElectrodePotential: ElectrodePotential "Equilibrium potential"
      Eeq = Eeq_int1(soc)+dEeqdT_int1(soc)*(T-298[K])
      dEeqdT = dEeqdT_int1(soc)
      cEeqref = def.csmax
      soc = c/cEeqref
      int1: Interpolation
        funcnametable = {int1, 1}
        funcname = Eeq_int1
        table = 
          {0.1750, 4.2763}
          {0.1950, 4.1898}
          {0.2150, 4.1507}
          {0.2350, 4.133}
          {0.2550, 4.1248}
          {0.2750, 4.1209}
          {0.2950, 4.119}
          {0.3150, 4.1179}
          {0.3350, 4.1171}
          {0.3550, 4.1165}
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        interp = piecewisecubic
        extrap = linear
        fununit = V
        plotfuncname = Eeq_int1
        defineinv = on
      int2: Interpolation
        funcnametable = {int2, 1}
        funcname = dEeqdT_int1
        table = 
          {0.15, 0.15e-3}
          {0.18, 0.25e-3}
          {0.20, 0.21e-3}
          {0.209, 0.19e-3}
          {0.26, 0.175e-3}
          {0.28, 0.166e-3}
          {0.30, 0.155e-3}
          {0.35, 0.11e-3}
          {0.394, 0.095e-3}
          {0.41, 0.05e-3}
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        interp = piecewisecubic
        fununit = V/K
        plotfuncname = dEeqdT_int1
    OperationalSOC: OperationalSOC "Operational electrode state of charge"
      socmax = elpot.Eeq_inv(E_min)
      socmin = elpot.Eeq_inv(E_max)
      E_max = 4.2[V]
      E_min = 3.9[V]
    EquilibriumConcentration: EquilibriumConcentration
      csEq = def.csmax*elpot.Eeq_inv(V)
  mat2: Common "LiPF6 in 1:2 EC:DMC and p(VdF-HFP) (Polymer, Li-ion Battery)" on domains 2
    def: def "Basic"
      diffusion = 7.5e-11[m^2/s]
      density = 1500
      thermalconductivity = 0.248
      heatcapacity = 1.61E3
    ElectrolyteConductivity: ElectrolyteConductivity
      sigmal = sigmal_int1(c/c_ref)
      c_ref = 1000[mol/m^3]
      int1: Interpolation
        funcnametable = {int1, 1}
        funcname = sigmal_int1
        table = 
          {0, 0.0108}
          {0.2000, 0.1259}
          {0.4000, 0.2055}
          {0.6000, 0.2553}
          {0.8000, 0.2810}
          {1.0000, 0.2873}
          {1.2000, 0.2788}
          {1.4000, 0.2595}
          {1.6000, 0.2331}
          {1.8000, 0.2027}
          {2.0000, 0.1710}
          {2.200, 0.1403}
          {2.4000, 0.1123}
          {2.6000, 0.0885}
          {2.8000, 0.0696}
          {3.0000, 0.0563}
        plotfuncname = sigmal_int1
    SpeciesProperties: SpeciesProperties
      transpNum = 0.363
      fcl = 0
    ElectrolyteSaltConcentration: ElectrolyteSaltConcentration
      cElsalt = 1000[mol/m^3]
  mat3: Common "Graphite, LixC6 MCMB (Negative, Li-ion Battery)" on domains 3
    def: def "Basic"
      youngsmodulus = E_int(c/csmax)
      poissonsratio = nu_int(c/csmax)
      electricconductivity = 100[S/m]
      diffusion = 1.4523e-13*exp(68025.7/8.314*(1/(T_ref/1[K])-1/(T2/1[K])))[m^2/s]
      thermalconductivity = 1[W/(m*K)]
      heatcapacity = 750[J/(kg*K)]
      density = 2300[kg/m^3]
      csmax = 31507[mol/m^3]
      T_ref = 318[K]
      T2 = min(393.15,max(T,223.15))
      thermalexpansioncoefficient = 4e-6
      int1: Interpolation | funcnametable = {int1, 1}; funcname = E_int; table = {{0, 32.47}, {0.333, 28.56}, {0.5, 58.06}, {1, 108.67}}; fununit = GPa; argunit = 1; plotfuncname = E_int
      int2: Interpolation | funcnametable = {int2, 1}; funcname = nu_int; table = {{0, 0.32}, {0.333, 0.39}, {0.5, 0.34}, {1, 0.24}}; plotfuncname = nu_int
    ElectrodePotential: ElectrodePotential "Equilibrium potential"
      Eeq = Eeq_int1(soc)+dEeqdT_int1(soc)*(T-298[K])
      dEeqdT = dEeqdT_int1(soc)
      cEeqref = def.csmax
      soc = c/cEeqref
      int1: Interpolation
        funcnametable = {int1, 1}
        funcname = Eeq_int1
        table = 
          {0, 2.781186612}
          {0.01, 1.520893224}
          {0.02, 0.893922607}
          {0.03, 0.581284406}
          {0.04, 0.42452844}
          {0.05, 0.344895805}
          {0.06, 0.303146342}
          {0.07, 0.279578072}
          {0.08, 0.264093089}
          {0.09, 0.251347845}
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        interp = piecewisecubic
        extrap = linear
        fununit = V
        plotfuncname = Eeq_int1
        defineinv = on
      int2: Interpolation
        funcnametable = {int2, 1}
        funcname = dEeqdT_int1
        table = {{0, 3.0e-4}, {0.17, 0}, {0.24, -6e-5}, {0.28, -1.6e-4}, {0.5, -1.6e-4}, {0.54, -9e-5}, {0.71, -9e-5}, {0.85, -1.0e-4}, {1.0, -1.2e-4}}
        fununit = V/K
        plotfuncname = dEeqdT_int1
    OperationalSOC: OperationalSOC "Operational electrode state of charge"
      socmax = elpot.Eeq_inv(E_min)
      socmin = elpot.Eeq_inv(E_max)
      E_max = 1[V]
      E_min = 0.075[V]
    ic: ic "Intercalation strain"
      dvol = dVOLdSOL(c/def.csmax)
      int1: Interpolation
        funcnametable = {int1, 1}
        funcname = dVOLdSOL
        table = 
          {0, 0}
          {0.00680272108844, 0.125}
          {0.0631681243926, 1.27364864865}
          {0.11175898931, 2.52364864865}
          {0.179786200194, 3.57094594595}
          {0.240038872692, 4.44932432432}
          {0.290573372206, 5.19256756757}
          {0.356656948494, 5.66554054054}
          {0.418853255588, 5.96959459459}
          {0.481049562682, 6.10472972973}
          {0.543245869776, 6.17364864865}
          {0.586005830904, 6.30608108108}
          {0.611273080661, 7.72635135135}
          {0.644314868805, 8.57094594595}
          {0.694849368319, 9.44932432432}
          {0.741496598639, 10.2939189189}
          {0.77648202138, 10.902027027}
          {0.823129251701, 11.5439189189}
          {0.854227405248, 12.152027027}
          {0.883381924198, 12.8277027027}
          {0.918367346939, 12.9966216216}
          {0.949465500486, 13.1655405405}
        extrap = linear
        fununit = %
        argunit = 1
        plotfuncname = dVOLdSOL
    EquilibriumConcentration: EquilibriumConcentration
      csEq = def.csmax*elpot.Eeq_inv(V)
  mat4: Common "Aluminum" on boundaries 1
    def: def "Basic"
      relpermeability = 1
      heatcapacity = 900[J/(kg*K)]
      thermalconductivity = 238[W/(m*K)]
      electricconductivity = 3.774e7[S/m]
      relpermittivity = 1
      thermalexpansioncoefficient = 23e-6[1/K]
      density = 2700[kg/m^3]
    Enu: Enu "Young's modulus and Poisson's ratio"
      E = 70[GPa]
      nu = 0.33
    Murnaghan: Murnaghan
      l = -250[GPa]
      m = -330[GPa]
      n = -350[GPa]
  mat5: Common "Copper" on boundaries 4
    def: def "Basic"
      relpermeability = 1
      electricconductivity = 5.998e7[S/m]
      thermalexpansioncoefficient = 17e-6[1/K]
      heatcapacity = 385[J/(kg*K)]
      relpermittivity = 1
      density = 8960[kg/m^3]
      thermalconductivity = 400[W/(m*K)]
    Enu: Enu "Young's modulus and Poisson's ratio"
      E = 110[GPa]
      nu = 0.35
    linzRes: linzRes "Linearized resistivity"
      rho0 = 1.72e-8[ohm*m]
      alpha = 0.0039[1/K]
      Tref = 298[K]
  mat6: Common "Polypropylene [solid]" on domains 2
    def: def "基本"
      thermalconductivity = k(T)
      heatcapacity = C(T)
      density = 9.00000000e+02
      TD = TD(T)
      thermalexpansioncoefficient = 0
      k: Piecewise | arg = T; pieces = {293.0, 573.16, -1.844683+0.01728236*T^1-5.595958E-5*T^2+8.080328E-8*T^3-4.317061E-11*T^4}; argunit = K; fununit = W/(m*K)
      C: Piecewise | arg = T; pieces = {293.0, 573.16, 18307.0711-217.341855*T^1+1.01268741*T^2-0.00213464542*T^3+2.07517488E-6*T^4-7.3616434E-10*T^5}; argunit = K; fununit = J/(kg*K)
      TD: Piecewise
        arg = T
        pieces = 
          {293.0, 353.0, 4.646933E-6-5.243467E-8*T^1+2.256484E-10*T^2-4.294038E-13*T^3+3.042465E-16*T^4}
          {353.0, 573.16, 1.528213E-6-1.161608E-8*T^1+3.481049E-11*T^2-4.613923E-14*T^3+2.288758E-17*T^4}
        argunit = K
        fununit = m^2/s
    Enu: Enu "杨氏模量和泊松比"
      E = 0.5e9
      nu = 0.4

Physics
  liion: LithiumIonBatteryMPH "锂离子电池" on all domains
    dependent variable phil
    Ac.Ac = 1[m^2]
    ElectrolyteType.ElectrolyteType = SingleIonConductor
    CellSettings.CellSOCandInitialChargeInventory = 1
    socicd1: SOCAndInitialChargeDistribution "SOC 和初始电荷分布 1"
      InitialChargeType = CellSOC
      Ecell_init = 4.1[V]
      AddFormationLoss = 0
      neges1: NegElectrodeSelection "负极选择 1" on domains 3
      poses1: PosElectrodeSelection "正极选择 1" on domains 1
    sep1: Separator "隔膜 1" (default) | ElectrolyteMaterial = mat2; epsl = 0.99
    ins1: Insulation "绝缘 1" (default)
    init1: init "初始值 1" (default) | cl = 5000[mol/m^3]
    pce1: PorousElectrode "正极" on domains 1
      ElectrolyteMaterial = mat2
      ElectrodeMaterial = mat1
      Species = solve_Mn
      Ms = 0.06355
      rhos = 8960
      FilmResistanceType = SurfaceResistance
      Rfilm = 1e-6[ohm*m^2]
      pin1: ParticleIntercalation "颗粒插层 1" (default)
        ParticleMaterial = mat1
        socmin_mat = from_mat
        rp = r_pos[um]
        SpeciesSettingsType = InitialSpeciesConcentration
        StressStrain = 1
        fvol = deltaV_pos
        E_mat = from_mat
        nu_mat = from_mat
      per1: PorousElectrodeReaction "多孔电极反应 1" (default)
        ElectrodeKinetics = LithiumInsertion
        i0refType = userdef
        k = 1e-12[m/s] * exp(-30000[J/mol]/8.314[J/(mol*K)]*(1/T - 1/298.15[K]))
        ilocmat_mat = FromKineticsExpression
      per2: PorousElectrodeReaction "溶解" (disabled) on all domains
        i0refType = FromRateConstant
        k = 1e-12[m/s] * exp( (-30000[J/mol]/8.314[J/(mol*K)]) * (1/T - 1/298.15[K]) )
        ilocmat_mat = FromKineticsExpression
    pce2: PorousElectrode "负极" on domains 3
      ElectrolyteMaterial = mat2
      ElectrodeMaterial = mat3
      AddVolumeChangeToElectrodeVolumeFraction = 0
      Species = sei
      Ms = 0.16[kg/mol]
      rhos = 1600[kg/m^3]
      FilmResistanceType = ThicknessAndConductivity
      Rfilm = 1e-5 + min( liion.c_dep_sei * 0.16 / 1600 / 1e-8 , 0.1 )
      sf0 = 1e-9[m]
      dsf_src = fromCommonDef
      sigmaf_mat = from_mat
      pin1: ParticleIntercalation "颗粒插层 1" (default)
        ParticleMaterial = mat3
        rp = r_neg[um]
        StressStrain = 1
        fvol = deltaV_neg
        E_mat = from_mat
        nu_mat = from_mat
      per1: PorousElectrodeReaction "多孔电极反应 1" (default)
      per2: PorousElectrodeReaction "副反应sei" on all domains
        i0refType = FromRateConstant
        i0_ref = (1e-9[A/m^2]) * (6[1/m]) / (96485[C/mol]) * exp(-40000[J/mol]/8.314[J/(mol*K)]*(1/T - 1/298.15[K]))
        k = 1e-13[m/s] * exp(-40000[J/mol]/8.314[J/(mol*K)]*(1/T - 1/298.15[K]))
        ilocmat_mat = FromKineticsExpression
    pot1: ElectricPotential "电势 1" on boundaries 4
    ec1: ElectrodeCurrent "电极电流 1" (disabled) on boundaries 1 | Its = (-20)[A]
    cdc1: ChargeDischargeCycling "充放电循环 1" on boundaries 1
      StartWith = Charge_first
      Ich = 0.5[A]
      Idch = (-1)[A]
      Vmax = 4.1[V]
      Vmin = 3.5[V]
  ht: HeatTransfer "固体传热" on domains 1-3
    dependent variable T
    solid1: SolidHeatTransferModel "固体 1" (default)
    init1: init "初始值 1" (default)
    ins1: ThermalInsulation "热绝缘 1" (default)
  solid: SolidMechanics "固体力学" on domains 1-3
    dependent variable u = {u, v, w}
    lemm1: LinearElasticModel "线弹性材料 1" (default)
    free1: Free "自由 1" (default)
    init1: init "初始值 1" (default)

Multiphysics
  ech1: ElectrochemicalHeating "电化学热 1" on all domains | ECHeat_physics = liion; Heat_physics = ht
  te1: ThermalExpansion "热膨胀 1" on domains 1-3 | Heat_physics = ht; Solid_physics = solid

Mesh
  mesh1 "网格 1" (physics-controlled)
    size: MeshSizeDefault "大小" | hauto = 1

Studies
  std1 "研究 1"
    cdi: CurrentDistributionInitialization "电流分布初始化"
    time: Transient "瞬态" | tunit = min; tlist = range(0,2,1200); initialtime = 0

Solver configurations
  sol1 "解 1" (study std1)
    v1: Variables "因变量 1"
      comp1_phil: Field "电解质电位 (comp1.phil)" | scalemethod = manual; scaleval = 1
      comp1_phis: Field "电势 (comp1.phis)" | scalemethod = manual; scaleval = 1
    s1: Stationary "稳态求解器 1" | stol = 1.0E-4
      fc1: FullyCoupled "全耦合 1" | linsolver = d1; minstep = 1.0E-6; maxiter = 50
      d1: Direct "直接 (liion)" | linsolver = pardiso
    su1: StoreSolution "解存储 1"
    v2: Variables "因变量 2" | initmethod = sol; notsolmethod = sol
      comp1_liion_pce1_cs: Field "固相浓度 (comp1.liion.pce1.cs)" | scalemethod = manual; scaleval = 10000
      comp1_liion_pce2_cs: Field "固相浓度 (comp1.liion.pce2.cs)" | scalemethod = manual; scaleval = 10000
      comp1_phil: Field "电解质电位 (comp1.phil)" | scalemethod = manual; scaleval = 1
      comp1_phis: Field "电势 (comp1.phis)" | scalemethod = manual; scaleval = 1
    t1: Time "瞬态求解器 1" | tlist = range(0,2,1200); rtol = 0.001; initialstepbdf = (1)[s]; maxorder = 2; eventout = on
      fc1: FullyCoupled "全耦合 1" | linsolver = d1; dtech = auto
      d1: Direct "直接 (liion)" | linsolver = pardiso
  sol2 "解存储 1" (study std1)

Datasets
  dset1: Solution | solution = sol1
  dset2: Solution | solution = sol2

Plots
  pg2: PlotGroup1D "电池和平均电极电池的荷电状态 (liion)" | data = dset1; ylabel = SOC (1)
    glob1: Global "全局 1" | expr = liion.SOC_cell; unit = 1; descr = 电池荷电状态
    glob2: Global "全局 2"
      expr = {liion.soc_average_pce1, liion.soc_average_pce2}
      unit = {1, 1}
      descr = {平均 SOC，正极, 平均 SOC，负极}
  pg6: PlotGroup1D "电池电位" | data = dset1
    glob1: Global "全局 1" | expr = liion.cdc1.phis0; unit = V; descr = 电池电位
  pg7: PlotGroup1D "过电位" | data = dset1
    ptgr1: PointGraph "点结果图 1" on boundaries 1 | data = dset1; expr = liion.eta_per1; descr = 过电位
  pg8: PlotGroup1D "X向电流密度" | data = dset1
    ptgr1: PointGraph "点结果图 1" on boundaries 2 | expr = liion.Isx; descr = 电极电流密度矢量，x 分量
  pg9: PlotGroup1D "一维绘图组 9" | data = dset1
    glob1: Global "全局 1" | expr = liion.cdc1.t_dch_start; unit = s; descr = 放电开始时间
  pg10: PlotGroup1D "一维绘图组 10" | data = dset1
    glob1: Global "全局 1" | expr = liion.Q_cell; unit = C; descr = 电池单元容量
  pg11: PlotGroup1D "一维绘图组 11" | data = dset1
    ptgr1: PointGraph "点结果图 1" on boundaries 2 | expr = liion.p_loss_act; descr = 动力学活化功率损耗

Exports
  plot1: Plot "绘图 1"